vectorize(x)  # Задание 1
# Номер 1
b1 := sqrt(83)
a1 := 6/11
b2 := 9.11
a2 := 0.545
a_a := |a1 - a2|
a_a = 0.000454545
a_b := |b1 - b2|
a_b = 0.000433579
r_a := a_a/a2
r_b := a_b/b2
r_a = 0.000834028
r_b = 4.75938e-5
# Второе выражение точнее
# Номер 2
# в узком смысле
a := 21.68563
r_a := 0.003
a_a := a*r_a
a_a = 0.0650569
# Верные цифры 2, 1
a_r1 := 22
a_a_r1 := a_a + |a_r1 - a|
a_a_r1 = 0.379427
# Верные цифры 2, 2
# в широком смысле
b := 3.7834
a_b := 0.0041
# Верные цифры 3, 7, 8
b_r1 := 3.78
a_b_r1 := a_b + |b - b_r1|
a_b_r1 = 0.0075
# Верные цифры 3, 7, 8
# Номер 3
# а)
a := 41.72
a_a := 0.005
r_a := a_a/a
r_a = 0.000119847
# б)
b := 0.678
a_b := 0.001
r_b := a_b/b
r_b = 0.00147493
# Задание 2
# Номер 1
# а)
b := 2.65
c := 0.7568
d := 21.7
a_b := 0.01
a_c := 0.0002
a_d := 0.02
r_c := a_c/c
r_d := a_d/d
r_b := a_b/b
r_c = 0.000264271
r_d = 0.000921659
r_b = 0.00377358
X := sqrt(c*d/b)
X = 2.48942
r_X := (r_c + r_d + r_b)/2
r_X = 0.00247976
a_X := r_X*X
a_X = 0.00617315
# б)
c := 0.8345
d := 13.8
b := 1.84
a_c := 0.0004
a_d := 0.03
a_b := 0.006
r_c := a_c/c
r_d := a_d/d
r_b := a_b/b
r_c = 0.000479329
r_d = 0.00217391
r_b = 0.00326087
X := sqrt(c*d/b)
X = 2.50175
r_X := (r_c + r_d + r_b)/2
r_X = 0.00295706
a_X := r_X*X
a_X = 0.00739781
# в)
c := 0.6384
d := 32.7
b := 4.88
a_c := 0.0002
a_d := 0.04
a_b := 0.03
r_c := a_c/c
r_d := a_d/d
r_b := a_b/b
r_c = 0.000313283
r_d = 0.00122324
r_b = 0.00614754
X := sqrt(c*d/b)
X = 2.06829
r_X := (r_c + r_d + r_b)/2
r_X = 0.00384203
a_X := r_X*X
a_X = 0.00794642
# Номер 2
# а)
a := 10.82
b := 2.786
m := 0.28
n := 14.7
a_a := 0.03
a_b := 0.0006
a_m := 0.006
a_n := 0.06
r_a_b := (a_a + a_b)/(a - b)
r_n_a := (a_n + a_a)/(n - a)
r_m := a_m/m
r_n_a = 0.0231959
r_m = 0.0214286
r_a_b = 0.00380881
y := nthroot(a - b, 3)/(m*(n - a)) = 1.84355
r_y := r_a_b/3 + r_m + r_n_a = 0.0458941
a_y := r_y*y = 0.0846078
# б)
a := 9.37
b := 3.108
m := 0.46
n := 15.2
a_a := 0.004
a_b := 0.0003
a_m := 0.002
a_n := 0.04
r_a_b := (a_a + a_b)/(a - b)
r_n_a := (a_n + a_a)/(n - a)
r_m := a_m/m
r_a_b = 0.000686682
r_n_a = 0.00754717
r_m = 0.00434783
y := nthroot(a - b, 3)/(m*(n - a)) = 0.687297
r_y := r_a_b/3 + r_m + r_n_a = 0.0121239
a_y := r_y*y = 0.00833272
# в)
a := 11.45
b := 4.431
m := 0.75
n := 16.7
a_a := 0.01
a_b := 0.002
a_m := 0.003
a_n := 0.05
r_a_b := (a_a + a_b)/(a - b)
r_n_a := (a_n + a_a)/(n - a)
r_m := a_m/m
r_n_a = 0.0114286
r_m = 0.004
r_a_b = 0.00170965
y := nthroot(a - b, 3)/(m*(n - a)) = 0.486263
r_y := r_a_b/3 + r_m + r_n_a = 0.0159985
a_y := r_y*y = 0.00777946
# Номер 3
# a)
a := 46.3
b := 29.72
c := 37.654
p := round((a + b + c)/2, 2) = 56.84
p_a := round(p - a, 2) = 10.54
p_b := round(p - b, 2) = 27.12
p_c := round(p - c, 2) = 19.19
S := round(sqrt(p*p_a*p_b*p_c), 1) = 558.4
# б)
a := 10.5
b := 34.18
c := 27.327
p := round((a + b + c)/2, 2) = 36
p_a := round(p - a, 2) = 25.5
p_b := round(p - b, 2) = 1.82
p_c := round(p - c, 2) = 8.67
S := round(sqrt(p*p_a*p_b*p_c), 1) = 120.4
# в)
a := 2.48
b := 5.344
c := 6.0218
p := round((a + b + c)/2, 3) = 6.923
p_a := round(p - a, 3) = 4.443
p_b := round(p - b, 3) = 1.579
p_c := round(p - c, 3) = 0.901
S := round(sqrt(p*p_a*p_b*p_c), 2) = 6.62
